// SBML level 2 version 4

model simple_analytic()
  // simple_analytic

  // Compartments:
  compartment cell; cell has MWBUILTINUNIT_liter;
  compartment extracellular = 8 MWBUILTINUNIT_liter;
  compartment cell_membrane; cell_membrane has MWDERIVEDUNIT_decimeter___2;  // 2-D
  compartment precipitate = 1;

  // Species:
  substanceOnly species $light in cell = 12;  // substance in MWBUILTINUNIT_molecule
  substanceOnly species monomer in cell = 0;  // substance in MWBUILTINUNIT_molecule
  substanceOnly species cell_growth_factor in cell = 0;  // substance in MWBUILTINUNIT_molecule
  substanceOnly species active_monomer in cell = 0;  // substance in MWBUILTINUNIT_molecule
  substanceOnly species active_dimer in cell = 0;  // substance in MWBUILTINUNIT_molecule
  species signal_dimer_concentration in cell;  // substance in MWBUILTINUNIT_molecule
  species active_monomer_concentration in cell;  // substance in MWBUILTINUNIT_molecule
  substanceOnly species soluble_growth_factor in extracellular = growth_factor_injection*(1 - precipitation_fraction);  // substance in MWBUILTINUNIT_molecule
  substanceOnly species transporter in cell_membrane = 10;  // substance in MWBUILTINUNIT_molecule
  substanceOnly species wall_part in cell_membrane = 9;  // substance in MWBUILTINUNIT_molecule
  substanceOnly species insoluble_growth_factor in precipitate = growth_factor_injection*precipitation_fraction;  // substance in MWBUILTINUNIT_molecule

  // Parameters:
  precipitation_fraction = 0.75;
  growth_factor_injection = 0 MWBUILTINUNIT_molecule;
  transporter_kcat = 0.1 MWDERIVEDUNIT_1__second;
  transporter_Km = 2 MWDERIVEDUNIT_molecule__liter;
  signal_dimerization_Kd = 5 MWDERIVEDUNIT_molecule__liter;
  wall_construction = 7 MWDERIVEDUNIT_liter__molecule_second;
  monomer_production = 3 MWDERIVEDUNIT_molecule__second;
  cell_radius has MWBUILTINPREFIX_deci_MWBUILTINUNIT_meter;
  wall_part_size = 0.5 MWDERIVEDUNIT_decimeter___2;
  monomer_excitability = 1.5 MWDERIVEDUNIT_liter__molecule_second;
  dimerization_on = 3;
  dimerization_off = 2;
  precipitate_dissolving = 0.25;

  // Assignment rules:
  signal_dimer_concentration := active_monomer_concentration^2/signal_dimerization_Kd;
  active_monomer_concentration := active_monomer/cell;
  cell_membrane := wall_part_size*wall_part;
  cell_radius := (cell_membrane/4*pi)^(1/2);
  cell := 4/3*pi*cell_radius^3;

  // Reactions:
  reaction_29: insoluble_growth_factor => soluble_growth_factor; precipitate_dissolving*insoluble_growth_factor;
  reaction_30: soluble_growth_factor => cell_growth_factor; transporter_kcat*transporter*soluble_growth_factor/(transporter_Km + soluble_growth_factor);
  reaction_31: $light + monomer => active_monomer; monomer_excitability*light*monomer/cell;
  reaction_32: active_dimer + cell_growth_factor => wall_part + cell_growth_factor; wall_construction*active_dimer*cell_growth_factor/cell;
  reaction_33: => monomer; monomer_production;
  reaction_34: cell_growth_factor => ; growth_factor_decay*cell_growth_factor;
    growth_factor_decay = 2 MWDERIVEDUNIT_1__second;
  reaction_35: active_dimer => ; dimer_decay*active_dimer;
    dimer_decay = 4 MWDERIVEDUNIT_1__second;
  reaction_36: active_monomer + active_monomer => active_dimer; dimerization_on*active_monomer*active_monomer/cell - dimerization_off*active_dimer;

  // Unit definitions:
  unit MWBUILTINUNIT_liter = metre^3 * 1e-3 dimensionless;
  unit MWDERIVEDUNIT_decimeter___2 = metre^2 * 0.01 dimensionless; MWDERIVEDUNIT_decimeter___2 is "decimeter^2";
  unit MWBUILTINUNIT_molecule = 1.660539e-24 mole;
  unit MWDERIVEDUNIT_1__second = dimensionless / second; MWDERIVEDUNIT_1__second is "1/second";
  unit MWDERIVEDUNIT_molecule__liter = mole * 1.660539e-21 dimensionless / metre^3; MWDERIVEDUNIT_molecule__liter is "molecule/liter";
  unit MWDERIVEDUNIT_liter__molecule_second = metre^3 * 6.022142e20 dimensionless / (mole * second); MWDERIVEDUNIT_liter__molecule_second is "liter/(molecule*second)";
  unit MWDERIVEDUNIT_molecule__second = mole * 1.660539e-24 dimensionless / second; MWDERIVEDUNIT_molecule__second is "molecule/second";
  unit MWBUILTINPREFIX_deci_MWBUILTINUNIT_meter = 0.1 metre; MWBUILTINPREFIX_deci_MWBUILTINUNIT_meter is "decimeter";
end
