// SBML level 2 version 4

model simple_massaction()
  // simple_massaction

  // Compartments:
  compartment cell = 1;
  compartment ecm = 1;

  // Species:
  species A in cell = 2/cell;
  species B in cell = 1/cell;
  species C_cell in cell = 0;
  species C_C in cell = 0; C_C is "C:C";
  species Bx in cell = 0;
  species D in cell = 0;
  species C_ecm in ecm = 0;

  // Parameters:
  k1 = 1;
  k2 = 1;
  k3 = 1;
  k4 = 1;
  k5 = 1;
  k6 = 1;
  k7 = 1;
  k8 = 1;
  k9 = 1;
  k10 = 1;
  k11 = 1;

  // Reactions:
  r1: A -> B + C_cell; k1*A - k2*B*C_cell;
  r2: 2 C_cell -> C_C; k3*C_cell^2 - k4*C_C;
  r3: B -> 2 Bx; k5*B - k6*Bx^2;
  r4: C_C + Bx -> D; k7*C_C*Bx - k8*D;
  r5: C_ecm => C_cell; k9*C_ecm;
  r6: Bx => ; k10*Bx;
  r7: => C_ecm; k11;
end
